b := [-234; 55; 140; -163; -88; -40; -197; -99; 30; 250]
a := [
    208, 90, -46, 5, -79, -116, -41, 45, -67, 94;
    90, 185, -40, 120, -1, 27, 18, 48, -31, 38;
    -46, -40, 235, 15, 22, -47, -92, -46, -2, -149;
    5, 120, 15, 190, 13, 111, 39, 21, -32, -37;
    -79, -1, 22, 13, 176, 62, 24, -36, 128, 43;
    -116, 27, -47, 111, 62, 186, 94, 4, 21, -16;
    -41, 18, -92, 39, 24, 94, 194, 154, 123, 110;
    45, 48, -46, 21, -36, 4, 154, 249, 130, 127;
    -67, -31, -2, -32, 128, 21, 123, 130, 233, 117;
    94, 38, -149, -37, 43, -16, 110, 127, 117, 246
]
ORIGIN := 1
n := rows(a)
n = 10
time(0) = 1.51568e9
before := time(0)
choleskydecompose :=
    for i ∈ 1 .. n
        for j ∈ 1 .. n
            l[i, j] ← 0
    for i ∈ 1 .. n
        summ ← 0
        for k ∈ 1 .. i
            summ ← summ + l[i, k]*l[i, k] if k ≠ i
        l[i, i] ← sqrt(a[i, i] - summ)
        for j ∈ 2 .. n
            summ ← 0
            for k ∈ 1 .. i
                summ ← summ + l[i, k]*l[j, k] if k ≠ i
            l[j, i] ← (a[j, i] - summ)/l[i, i]
    l
L := choleskydecompose
L = [
    14.4222, 0, 0, 0, 0, 0, 0, 0, 0, 0;
    6.24038, 12.0854, 0, 0, 0, 0, 0, 0, 0, 0;
    -3.18953, -1.66284, 14.9017, 0, 0, 0, 0, 0, 0, 0;
    0.346688, 9.7503, 2.1688, 9.49252, 0, 0, 0, 0, 0, 0;
    -5.47766, 2.74568, 0.610296, -1.39012, 11.6684, 0, 0, 0, 0, 0;
    -8.04315, 6.38722, -4.1628, 6.3776, 1.01224, 4.63506, 0, 0, 0, 0;
    -2.84284, 2.95731, -6.45225, 2.64889, 0.679452, 1.68388, 11.1905, 0, 0, 0;
    3.12019, 2.3606, -2.15564, 0.166121, -2.04343, 1.30613, 12.5758, 8.06135, 0, 0;
    -4.64561, -0.166284, -1.1471, -2.76852, 8.55824, -2.39153, 9.6894, 5.16474, 1.69945, 0;
    6.51773, -0.221182, -8.62848, -1.93727, 7.01742, 1.54669, 6.36871, 2.62182, 0.219574, 5.11347
]
forward_substitution :=
    for i ∈ 1 .. n
        Y[i] ← 0
    for i ∈ 1 .. n
        summ ← 0
        for k ∈ 1 .. i
            summ ← summ + L[i, k]*Y[k] if k ≠ i
        Y[i] ← (b[i] - summ)/L[i, i]
    Y
Y := forward_substitution
Y = [-16.225; 12.9288; 7.36481; -31.5414; -22.3436; 0.292321; -12.1175; 6.02489; 91.8622; 109.241]
back_substitution :=
    L ← transpose(L)
    for i ∈ 1 .. n
        X[i] ← 0
    amount_of_found_x ← 0
    for i ∈ n, n - 1 .. 1
        summ ← 0
        for k ∈ n, n - 1 .. 1
            break if n - k == amount_of_found_x
            summ ← summ + L[i, k]*X[k]
        X[i] ← (Y[i] - summ)/L[i, i]
        amount_of_found_x ← amount_of_found_x + 1
    X
X := back_substitution
X = [3.37326; 20.9936; 19.4013; -12.2737; -61.496; 35.405; -13.755; -39.0636; 51.2938; 21.3634]
time(1) - before = 558.472
