a := [
    62, 29, -94, -38, 67, -26, -68, 16, -10;
    -83, -57, -48, 7, -55, 60, -19, 73, -87;
    -98, 42, 19, -93, 60, 94, -91, -8, -71;
    61, -56, -56, 49, 74, 17, -52, 7, 6;
    56, -53, -66, -95, -46, -28, -57, -34, -24;
    -93, -12, 6, 9, -49, -99, 96, -47, -51;
    -99, -98, -16, 86, -25, 45, -71, 23, -18;
    63, 56, -95, 53, 33, 73, -70, -86, -30;
    7, -1, -24, -32, -78, -98, -88, 21, -70
]
b := [-25; -32; -83; -28; -36; 3; -49; 11; 90]
ORIGIN := 1
n := rows(a)
n = 9
ab := augment(a, b)
ab = [
    62, 29, -94, -38, 67, -26, -68, 16, -10, -25;
    -83, -57, -48, 7, -55, 60, -19, 73, -87, -32;
    -98, 42, 19, -93, 60, 94, -91, -8, -71, -83;
    61, -56, -56, 49, 74, 17, -52, 7, 6, -28;
    56, -53, -66, -95, -46, -28, -57, -34, -24, -36;
    -93, -12, 6, 9, -49, -99, 96, -47, -51, 3;
    -99, -98, -16, 86, -25, 45, -71, 23, -18, -49;
    63, 56, -95, 53, 33, 73, -70, -86, -30, 11;
    7, -1, -24, -32, -78, -98, -88, 21, -70, 90
]
time(0) = 1.51568e9
before := time(0)
forward_elimination(step) :=
    ab ← ab
    for k ∈ 1 .. n - 1
        for i ∈ (k + 1) .. n
            multiplier ← (ab[i, k]/ab[k, k])
            for j ∈ k .. n + 1
                ab[i, j] ← ab[i, j] - multiplier*ab[k, j]
            U[k] ← ab
    U[step]
step := 1 .. n - 1
forward_elimination(step) =  # no stored result
upper_triangular := submatrix(forward_elimination(n - 1), 1, n, 1, n)
upper_triangular = [
    62, 29, -94, -38, 67, -26, -68, 16, -10;
    0, -18.1774, -173.839, -43.871, 34.6935, 25.1935, -110.032, 94.4194, -100.387;
    0, 0, -969.621, -365.062, 333.553, 174.646, -730.193, 473.553, -571.907;
    0, 0, 0, -27.7013, 137.391, 77.6027, -109.674, -35.1877, -15.6663;
    0, 0, 0, 0, -793.158, -427.751, 539.843, 124.851, 56.0377;
    0, 0, 0, 0, 0, -147.089, 82.211, -98.1812, 5.9778;
    0, 0, 0, 0, 0, 0, -96.0123, -19.0188, 56.6544;
    0, 0, 0, 0, 0, 0, 0, -254.11, -48.7231;
    0, 0, 0, 0, 0, 0, 0, 0, -164.693
]
b_new := submatrix(forward_elimination(n - 1), 1, n, n + 1, n + 1)
b_new = [-25; -65.4677; -438.876; -81.3773; 395.787; 11.7075; -20.1385; -23.4359; 85.9995]
back_substitution :=
    a ← upper_triangular
    b ← b_new
    x[n] ← b[n]/a[n, n]
    for i ∈ n - 1, n - 2 .. 1
        sum ← 0
        for j ∈ (i + 1) .. n
            sum ← sum + a[i, j]*x[j]
        x[i] ← (b[i] - sum)/a[i, i]
    x
X := back_substitution
X = [0.594654; 0.47668; 0.556617; 0.521874; -0.433756; -0.305489; -0.136477; 0.19235; -0.52218]
time(1) - before = 262.464
