17*x^7 + 268*x^6 + 472*x^5 - 837*x^4 - 744*x^3 + 414*x^2 + 124*x - 34
v := [-34; 124; 414; -744; -837; 472; 268; 17]
polyroots(v) = [-13.4463; -3.01926; -0.947783; -0.38313; 0.198668; 0.52012; 1.31293]
