a := [
    62, 29, -94, -38, 67, -26, -68, 16, -10;
    -83, -57, -48, 7, -55, 60, -19, 73, -87;
    -98, 42, 19, -93, 60, 94, -91, -8, -71;
    61, -56, -56, 49, 74, 17, -52, 7, 6;
    56, -53, -66, -95, -46, -28, -57, -34, -24;
    -93, -12, 6, 9, -49, -99, 96, -47, -51;
    -99, -98, -16, 86, -25, 45, -71, 23, -18;
    63, 56, -95, 53, 33, 73, -70, -86, -30;
    7, -1, -24, -32, -78, -98, -88, 21, -70
]
b := [-25; -32; -83; -28; -36; 3; -49; 11; -90]
ORIGIN := 1
n := rows(a)
n = 9
time(0) = 1.51568e9
before := time(0)
ludecompose :=
    U ← a
    for i ∈ 1 .. n
        L[i, i] ← 1
    for k ∈ 1 .. n - 1
        for i ∈ k + 1 .. n
            multiplier ← U[i, k]/U[k, k]
            L[i, k] ← multiplier
            for j ∈ 1 .. n
                U[i, j] ← U[i, j] - multiplier*U[k, j]
    [U; L]
U := ludecompose[1]
U = [
    62, 29, -94, -38, 67, -26, -68, 16, -10;
    0, -18.1774, -173.839, -43.871, 34.6935, 25.1935, -110.032, 94.4194, -100.387;
    0, 0, -969.621, -365.062, 333.553, 174.646, -730.193, 473.553, -571.907;
    0, 0, 0, -27.7013, 137.391, 77.6027, -109.674, -35.1877, -15.6663;
    0, 0, 0, 0, -793.158, -427.751, 539.843, 124.851, 56.0377;
    0, 0, 0, 0, 0, -147.089, 82.211, -98.1812, 5.9778;
    0, 0, 0, 0, 0, 0, -96.0123, -19.0188, 56.6544;
    0, 0, 0, 0, 0, 0, 0, -254.11, -48.7231;
    0, 0, 0, 0, 0, 0, 0, 0, -164.693
]
L := ludecompose[2]
L = [
    1, 0, 0, 0, 0, 0, 0, 0, 0;
    -1.33871, 1, 0, 0, 0, 0, 0, 0, 0;
    -1.58065, -4.8323, 1, 0, 0, 0, 0, 0, 0;
    0.983871, 4.6504, -0.871375, 1, 0, 0, 0, 0, 0;
    0.903226, 4.3567, -0.800587, 5.84121, 1, 0, 0, 0, 0;
    -1.5, -1.73292, 0.449916, -1.45201, -0.203042, 1, 0, 0, 0;
    -1.59677, 2.84383, -0.338556, -0.956279, -0.286995, 0.391513, 1, 0, 0;
    1.01613, -1.45963, 0.261157, -4.43721, -0.678405, -0.983985, 0.107633, 1, 0;
    0.112903, 0.235138, -0.0283502, 1.00153, 0.279726, 0.367841, 1.52645, -0.298615, 1
]
forward_substitution :=
    Y[1] ← b[1]/L[1, 1]
    for i ∈ 2 .. n
        sum ← 0
        for j ∈ 1 .. i - 1
            sum ← sum + L[i, j]*Y[j]
        Y[i] ← (b[i] - sum)/L[i, i]
    Y
Y := forward_substitution
Y = [-25; -65.4677; -438.876; -81.3773; 395.787; 11.7075; -20.1385; -23.4359; -94.0005]
back_substitution :=
    X[n] ← Y[n]/U[n, n]
    for i ∈ n - 1 .. 1
        sum ← 0
        for j ∈ i + 1 .. n
            sum ← sum + U[i, j]*X[j]
        X[i] ← (Y[i] - sum)/U[i, i]
    X
X := back_substitution
X = [0.0208991; 0.262652; -0.360826; 0.0607555; -0.228625; 0.262468; 0.54995; -0.0172106; 0.570761]
time(1) - before = 64.491
