Given
f2(x) := e^cosh(x) + x^5 + x^15*sin(x) - 13
x^2*cos(x) + log(e^x, 2) + π - 9*π*x^3 == 0
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Find(x) → 0.527169455667
x0 := -3.60
root(f2(x0), x0) = -3.60706
x0 := -3.14
root(f2(x0), x0) = -3.14546
f(x) := x^2*cos(x) + log(e^x, 2) + π - 9*π*x^3
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x0 := -1.16
root(f2(x0), x0) = -1.16713
x0 := 1.12
root(f2(x0), x0) = 1.12974
x0 := 3.14
root(f2(x0), x0) = 3.14548
x0 := 3.60
root(f2(x0), x0) = 3.60706
