a := [
    -333, -26, 0, 0, 0, 0, 0, 0, 0, 0;
    66, -396, -127, 0, 0, 0, 0, 0, 0, 0;
    0, 371, -744, -244, 0, 0, 0, 0, 0, 0;
    0, 0, 57, -935, 357, 0, 0, 0, 0, 0;
    0, 0, 0, -105, 339, -44, 0, 0, 0, 0;
    0, 0, 0, 0, 38, -79, -27, 0, 0, 0;
    0, 0, 0, 0, 0, 103, 711, -88, 0, 0;
    0, 0, 0, 0, 0, 0, -44, -618, -11, 0;
    0, 0, 0, 0, 0, 0, 0, 68, -759, -208;
    0, 0, 0, 0, 0, 0, 0, 0, 38, -231
]
b := [-497; -419; 234; -470; 649; 966; 461; -312; 168; -785]
ORIGIN := 1
n := rows(a)
n = 10
time(0) = 1.51568e9
before := time(0)
tdma :=
    for i ∈ 1 .. n
        tau[i] ← 0
        delta[i] ← 0
        lambda[i] ← 0
    tau[1] ← a[1, 1]
    delta[1] ← (-1)*a[1, 2]/tau[1]
    lambda[1] ← b[1]/tau[1]
    for i ∈ 2 .. n - 1
        tau[i] ← a[i, i] + a[i, i - 1]*delta[i - 1]
        delta[i] ← (-1)*a[i, i + 1]/tau[i]
        lambda[i] ← (b[i] - a[i, i - 1]*lambda[i - 1])/tau[i]
    tau[n] ← a[n, n] + a[n, n - 1]*delta[n - 1]
    delta[n] ← 0
    lambda[n] ← (b[n] - a[n, n - 1]*lambda[n - 1])/tau[n]
    [tau; delta; lambda]
TAU := tdma[1]
DELTA := tdma[2]
LAMBDA := tdma[3]
TAU = [-333; -401.153; -861.454; -951.145; 299.59; -73.419; 673.122; -623.752; -760.199; -241.397]
DELTA = [-0.0780781; -0.316587; -0.283242; 0.375337; 0.146868; -0.367752; 0.130734; -0.0176352; -0.273612; 0]
LAMBDA = [1.49249; 1.29004; 0.283945; 0.511158; 2.34545; -11.9434; 2.51243; 0.32297; -0.192105; 3.22166]
back_substitution :=
    for i ∈ 1 .. n
        X[i] ← 0
    X[n] ← LAMBDA[n]
    for i ∈ n - 1, n - 2 .. 1
        X[i] ← DELTA[i]*X[i + 1] + LAMBDA[i]
    X
X := back_substitution
X = [1.39402; 1.26124; 0.0909797; 0.681274; 0.453236; -12.8838; 2.55713; 0.341903; -1.07359; 3.22166]
time(1) - before = 155.727
